OpenVSP model (file version 4), 11 components.
Geometry view with OpenVSP parameter names; values to 6 digits, angles in degrees, lengths in the model's unit.
Overall bounding box: X_Min=0 X_Len=9.37669 Y_Min=-5.17812 Y_Len=10.3562 Z_Min=-0.285 Z_Len=2.36887

Wing "horizontal_stabilizer"
  location (X Y Z) 7.789 0 0.3314, rotation 0 0 0
  symmetric about XZ
  bounding box size 0.775666 3.34551 0.0931398
  totals: TotalSpan=3.25237 TotalProjectedSpan=3.25237 TotalChord=0.775666 TotalArea=2.52275
  root: chord 0.775666, twist 0, NACA 4-series Camber=0 CamberLoc=0.2 ThickChord=0.12
  sections:
    n  Span     Root_Chord  Tip_Chord  Area     Sweep  Sweep_Location  Dihedral  Twist  Twist_Location  tip airfoil
    1  1.62618  0.775666    0.775666   1.26138  0      0.25            0         0      0.25            as above

Wing "main_wing"
  location (X Y Z) 2.986 0 1.077, rotation 0 0 0
  symmetric about XZ
  bounding box size 1.96874 9.63553 0.382099
  totals: TotalSpan=9.35624 TotalProjectedSpan=9.35482 TotalChord=1.85954 TotalArea=17.3983
  root: chord 1.96874, twist 0, NACA 4-series Camber=0 CamberLoc=0.2 ThickChord=0.160939
  sections:
    n  Span     Root_Chord  Tip_Chord  Area     Sweep  Sweep_Location  Dihedral  Twist  Twist_Location  tip airfoil
    1  4.67812  1.96874     1.75033    8.69915  0      0.25            1         0      0.25            as above

Wing "vertical_stabilizer"
  location (X Y Z) 7.25 0 0.497, rotation 90 0 0
  bounding box size 2.12669 0.187838 1.58687
  totals: TotalSpan=1.55675 TotalProjectedSpan=1.55675 TotalChord=1.10643 TotalArea=1.72243
  root: chord 1.56474, twist 0, NACA 4-series Camber=0 CamberLoc=0.2 ThickChord=0.12
  sections:
    n  Span     Root_Chord  Tip_Chord  Area     Sweep  Sweep_Location  Dihedral  Twist  Twist_Location  tip airfoil
    1  1.55675  1.56474     0.648117   1.72243  38.75  0.25            0         0      0.25            as above

Fuselage "fuselage"
  location (X Y Z) 0 0 0, rotation 0 0 0
  bounding box size 8.45 1.1 1.497
  Design: Length=8.45
  cross sections:
    n  XLocPercent  YLocPercent  ZLocPercent  shape
    0  0            0            0            point
    1  0.165325     0            0.03         ellipse Ellipse_Height=1.077 Ellipse_Width=1.1
    2  0.41162      0            0.06         ellipse Ellipse_Height=1.41 Ellipse_Width=1.1
    3  0.869822     0            0.04         ellipse Ellipse_Height=0.5 Ellipse_Width=1.1
    4  1            0            0.039        point

Custom "cruise_propeller"
  location (X Y Z) 2.79183 4.67812 1.07843, rotation 0 0 0
  symmetric about XZ
  bounding box size 0 10.3562 1
  Design: Diameter=1
  custom script Disk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

Custom "high_lift_propeller_1"
  location (X Y Z) 2.88801 0.77 0.861835, rotation 0 0 0
  symmetric about XZ
  bounding box size 0 2.06 0.52
  Design: Diameter=0.52
  custom script Disk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

Custom "high_lift_propeller_2"
  location (X Y Z) 2.88837 1.39162 0.862024, rotation 0 0 0
  symmetric about XZ
  bounding box size 0 3.30325 0.52
  Design: Diameter=0.52
  custom script Disk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

Custom "high_lift_propeller_3"
  location (X Y Z) 2.88873 2.01325 0.862213, rotation 0 0 0
  symmetric about XZ
  bounding box size 0 4.5465 0.52
  Design: Diameter=0.52
  custom script Disk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

Custom "high_lift_propeller_4"
  location (X Y Z) 2.88909 2.63487 0.862403, rotation 0 0 0
  symmetric about XZ
  bounding box size 0 5.78975 0.52
  Design: Diameter=0.52
  custom script Disk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

Custom "high_lift_propeller_5"
  location (X Y Z) 2.88945 3.2565 0.862592, rotation 0 0 0
  symmetric about XZ
  bounding box size 0 7.03299 0.52
  Design: Diameter=0.52
  custom script Disk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

Custom "high_lift_propeller_6"
  location (X Y Z) 2.88981 3.87812 0.862781, rotation 0 0 0
  symmetric about XZ
  bounding box size 0 8.27624 0.52
  Design: Diameter=0.52
  custom script Disk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

VSPAERO settings: Sref=17.3983 bref=9.35624 cref=1.85954 Xcg=3.96502 Ycg=0 Zcg=0.651931 AlphaStart=0 AlphaEnd=10 AlphaNpts=11 BetaStart=0 BetaEnd=0 BetaNpts=1 MachStart=0.659839 MachEnd=0 MachNpts=1 ReCref=1e+07 Vinf=224.539 Rho=1.225
